*Heading
** Job name: a2996 Model name: Model-1
** Generated by: Abaqus/CAE 6.12-1
*Preprint, echo=NO, model=NO, history=NO, contact=NO
**
** PARTS
**
*Part, name=Part-1
*Node
      1,          40.,           5.
      2,           0.,           5.
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*Element, type=CPE3
  1,  2205,  2706,  2541
  2,  1821,  1822,  1533
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*Element, type=CPE4R
  492,  1038, 23492,     8,     9
  493,   867, 23492,  1106,   866
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*Nset, nset=Set-1, generate
     1,  26837,      1
*Elset, elset=Set-1, generate
     1,  26673,      1
*Nset, nset=Set-27, generate
     1,  26837,      1
*Elset, elset=Set-27, generate
     1,  26673,      1
** Section: Section-linela
*Solid Section, elset=Set-27, material=Material-linela
,
*End Part
**
**
** ASSEMBLY
**
*Assembly, name=Assembly
**
*Instance, name=Part-1-1, part=Part-1
*End Instance
**
*Nset, nset=Set-2, instance=Part-1-1
 5,
*Nset, nset=Set-3, instance=Part-1-1
   4,   5, 666, 667, 668, 669
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*Elset, elset=Set-3, instance=Part-1-1
 1485, 1519, 1520, 1521, 1522, 1554
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*Elset, elset=_Surf-1_S1, internal, instance=Part-1-1
 25895, 26634, 26635, 26637, 26640
*Elset, elset=_Surf-1_S4, internal, instance=Part-1-1
 25913, 26622
*Elset, elset=_Surf-1_S3, internal, instance=Part-1-1
 26618,
*Elset, elset=_Surf-1_S2, internal, instance=Part-1-1
 26633, 26636
*Surface, type=ELEMENT, name=Surf-1
_Surf-1_S1, S1
_Surf-1_S4, S4
_Surf-1_S2, S2
_Surf-1_S3, S3
*End Assembly
**
** MATERIALS
**
*Material, name=Material-linela
*Elastic
1000., 0.3
** ----------------------------------------------------------------
**
** STEP: Step-1
**
*Step, name=Step-1
*Static
1., 1., 1e-05, 1.
**
** BOUNDARY CONDITIONS
**
** Name: BC-1 Type: Displacement/Rotation
*Boundary
Set-3, 2, 2
** Name: BC-2 Type: Displacement/Rotation
*Boundary
Set-2, 1, 1
Set-2, 2, 2
**
** LOADS
**
** Name: Load-1   Type: Surface traction
*Dsload, constant resultant=YES
Surf-1, TRVEC, 5., 0., 1., 0.
**
** OUTPUT REQUESTS
**
*Restart, write, frequency=0
**
** FIELD OUTPUT: F-Output-1
**
*Output, field
*Node Output
CF, RF, RM, RT, TF, U, UR, UT
V, VF, VR, VT
*Element Output, directions=YES
ALPHA, ALPHAN, BF, CENTMAG, CENTRIFMAG, CORIOMAG, CS11, CTSHR, E, EE, ELEDEN, ELEN, ENER, ER, ESF1, GRAV
HP, IE, LE, MISES, MISESMAX, MISESONLY, NE, NFORC, NFORCSO, P, PE, PEEQ, PEEQMAX, PEEQT, PEMAG, PEQC
PRESSONLY, PS, ROTAMAG, S, SALPHA, SE, SEE, SEP, SEPE, SF, SPE, SSAVG, THE, TRIAX, TRNOR, TRSHR
TSHR, VE, VEEQ, VS
*Contact Output
CDISP, CDISPETOS, CDSTRESS, CFORCE, CNAREA, CSTATUS, CSTRESS, CSTRESSETOS, PPRESS
**
** HISTORY OUTPUT: H-Output-1
**
*Output, history, variable=PRESELECT
*End Step
